T_in := 70 R
T_out := 160 R
Delta_T := T_out - T_in = 90 R
Heat_input := 40000 BTU/hr
ρ := 8.154242 lbm/gal
η := 78%
C_p := 1.00124 BTU/(hr*R*lbm)
A := (Heat_input*η) = 31200 BTU/hr
B := Delta_T*ρ = 733.882 R*lbm/gal
Volume := A/B*1/C_p = 42.461 gal
Time := 60 min
Rate := Volume/Time = 0.707683 gal/min
